*Heading
** Job name: Miehe2014_3D Model name: Model-1
** Generated by: Abaqus/CAE 2024
*Preprint, echo=NO, model=NO, history=NO, contact=NO
** ----------------------------------------------------------------
**
** PART INSTANCE: Miehe2014-1
**
******************************************************************
** UNITS USED:
** Length  = mm
** Stress  = MPa
** Time    = s
******************************************************************
*Parameter
lc = 0.03
CP = 1.e0
zeta = 1.e-3
erff = 240.e0
Gshear = 5e0
Poisson = 0.45e0
*Node
      1,           1., 0.0199999996,           0.
      2,           0., 0.0199999996,           0.
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*Element, type=C3D8T
   1,  1201,  3209,  3218,  3220,  7902,  9910,  9919,  9921
   2,  1735,  1920,  2057,  2065,  8436,  8621,  8758,  8766
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*Nset, nset=nALL, generate
     1,  10776,      1
*Elset, elset=elALL, generate
    1,  6906,     1
*Solid Section, elset=elall, material=NeoHookean
,
*Nset, nset=LEFT
    2,    3,    5,    8,   10,   13
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*Elset, elset=LEFT
   48,  138,  139,  141,  142,  143
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*Nset, nset=TOP
    3,    4,    7,    8,  224,  225
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*Elset, elset=TOP
    7,    9,   24,   25,   26,   27
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*Nset, nset=BOTTOM
   11,   12,   15,   16,  552,  553
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*Elset, elset=BOTTOM
 5410, 5414, 5418, 5422, 5426, 5430
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*Nset, nset=RIGHT
    1,    4,    6,    7,   12,   16
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*Elset, elset=RIGHT
    4,    5,    6,    7,    8,  198
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*Nset, nset=FRONT
    5,    6,    7,    8,   13,   14
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*Elset, elset=FRONT
 2674, 2675, 2676, 2677, 2678, 2679
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*Nset, nset=BACK
    1,    2,    3,    4,    9,   10
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*Elset, elset=BACK
    1,    2,    3,    4,    5,    6
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**
**
*****************************************************************
**
** MATERIALS
**
*****************************************************************
*Material, name=NeoHookean
*User material,Constants=5
<Gshear>,<Poisson>,<erff>,<lc>,<zeta>
*User material, type=thermal, constants=4
<erff>,<lc>,<zeta>,<CP>
*Depvar
11,
1,   Hr, Hr
2,   detF, detF
3,   F_11, F_11
4,   F_22, F_22
5,   F_33, F_33
6,   F_12, F_12
7,   F_13, F_13
8,   F_21, F_21
9,   F_23, F_23
10,   F_31, F_31
11,   F_32, F_32
*Density
1.e-3
**
*********************************************************************
**                 INITIAL CONDITIONS, MODEL DATA
*********************************************************************
*Initial Conditions, type=TEMPERATURE
nall, 0.
*********************************************************************
**                 BOUNDARY CONDITIONS, MODEL DATA
*********************************************************************
****************************************************************
**			AMPLITUDE DEFINITION
****************************************************************
**
********************************************************************
**             		ANALYSIS STEP, STANDARD
******************************************************************
*Step, name=Step-1, nlgeom=YES, inc=5000000, unsymm=yes
*Coupled temperature-displacement, deltmx=1.0
1e-1, 1600, 1e-9, 1e-1
*CONTROLS, PARAMETERS=TIME INCREMENTATION
100, 100, 100, 100, 100, 100, ,20 , , ,
*SOLUTION TECHNIQUE, TYPE = SEPARATED
** BOUNDARY CONDITIONS
**
** Name: XSYM Type: Symmetry/Antisymmetry/Encastre
*Boundary
BOTTOM, YSYMM
** Name: YSYM Type: Symmetry/Antisymmetry/Encastre
*Boundary
LEFT, XSYMM
** Name: ZSYM Type: Symmetry/Antisymmetry/Encastre
*Boundary
BACK, ZSYMM
*Boundary, amplitude=const_rate1
top, 2, 2
*amplitude,name=const_rate1,value=absolute,definition=tabular
0,0,1600.,0.64,
** *Restart, write, frequency=1, overlay
*Output, field, time interval=1, time marks=no
*node output, nset=nall
u,nt,RF
*Element output, elset=elall
le,SDV
*Output, history, frequency=1
*Node Output, nset=top
RF2, U2
*End Step
******************************************************************
