*Heading
** Job name: SENB Model name: Model-1
** Generated by: Abaqus/CAE 2024
*Preprint, echo=NO, model=NO, history=NO, contact=NO
** ----------------------------------------------------------------
**
** PART INSTANCE: SENB
**
******************************************************************
** UNITS USED:
** Length  = mm
** Stress  = MPa
** Time    = s
******************************************************************
*Parameter
CP = 1.e0
zeta = 1.e-3
erff = 5.
lc = 0.1
Eyoung = 210000.
Poisson = 0.3
Y0 = 300
H = 5.0
Ysat= 450
mRate = 0.05
nu0 = 1.e-4
psi_cr = 9.e0
** PART INSTANCE: beam-1
**
*Node
      1,   74.5100021,           7.
      2,   74.5100021,          10.
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*Element, type=CPE4T
   1,   15,   16, 1381, 4662
   2,  270,  271, 2318, 4057
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*Nset, nset=nall, generate
     1,  17321,      1
*Elset, elset=elall, generate
     1,  17122,      1
** Section: Section-1
*Solid Section, elset=elall, material=Material-1
,
** ----------------------------------------------------------------
**
** PART INSTANCE: support-1
**
*System
   75.251102,    5.250002,          0.,   76.251102,    5.250002,          0.
*Node
  17322,         -0.5,           6.
  17323,           0.,           6.
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*Element, type=R2D2
17123, 17323, 17326
17124, 17326, 17327
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*Node
  17388, -0.251102448,   4.74999762,           0.
*Nset, nset=support-1-RefPt_
17388,
*Elset, elset=support-1, generate
17123, 17188,   1
** ----------------------------------------------------------------
**
** PART INSTANCE: support-2
**
*System
   70.248898,   11.749998,          0.,   69.248898,   11.749998,          0.
*Node
  17389,         -0.5,           6.
  17390,           0.,           6.
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*Element, type=R2D2
17189, 17390, 17393
17190, 17393, 17394
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*Node
  17455, -0.251102448,   4.74999762,           0.
*Nset, nset=support-2-RefPt_
17455,
*Elset, elset=support-2, generate
17189, 17254,   1
** ----------------------------------------------------------------
**
** PART INSTANCE: support-3
**
*System
   79.248898,   11.749998,          0.,   78.248898,   11.749998,          0.
*Node
  17456,         -0.5,           6.
  17457,           0.,           6.
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*Element, type=R2D2
17255, 17457, 17460
17256, 17460, 17461
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*Node
  17522, -0.251102448,   4.74999762,           0.
*Nset, nset=support-3-RefPt_
17522,
*Elset, elset=support-3, generate
17255, 17320,   1
*System
*Nset, nset=_PickedSet28
17388,
*Nset, nset=_PickedSet29
17455,
*Nset, nset=_PickedSet29
17522,
*Nset, nset=_PickedSet124
 14989,
*Rigid Body, ref node=support-1-RefPt_, elset=support-1
*Rigid Body, ref node=support-2-RefPt_, elset=support-2
*Rigid Body, ref node=support-3-RefPt_, elset=support-3
*Elset, elset=__Int-1_gcs0_21_SPOS, generate
17153, 17168,   1
*Surface, type=ELEMENT, name=_Int-1_gcs0_21
__Int-1_gcs0_21_SPOS, SPOS
*Elset, elset=__Int-1_gcs0_25_SNEG, generate
17153, 17168,   1
*Surface, type=ELEMENT, name=_Int-1_gcs0_25
__Int-1_gcs0_25_SNEG, SNEG
*Elset, elset=__Int-1_gcs0_29_SPOS, generate
17219, 17234,   1
*Surface, type=ELEMENT, name=_Int-1_gcs0_29
__Int-1_gcs0_29_SPOS, SPOS
*Elset, elset=__Int-1_gcs0_33_SNEG, generate
17219, 17234,   1
*Surface, type=ELEMENT, name=_Int-1_gcs0_33
__Int-1_gcs0_33_SNEG, SNEG
*Elset, elset=__Int-1_gcs0_37_SPOS, generate
17285, 17300,   1
*Surface, type=ELEMENT, name=_Int-1_gcs0_37
__Int-1_gcs0_37_SPOS, SPOS
*Elset, elset=__Int-1_gcs0_41_SNEG, generate
17285, 17300,   1
*Surface, type=ELEMENT, name=_Int-1_gcs0_41
__Int-1_gcs0_41_SNEG, SNEG
*****************************************************************
**
** MATERIALS
**
*****************************************************************
*Material, name=Material-1
*User material, Constants=11
<Eyoung>,<Poisson>,<Y0>,<H>,<Ysat>,<mRate>,<nu0>,<erff>,
<lc>,<zeta>,<psi_cr>
*User material, type=thermal, constants=4
<erff>,<lc>,<zeta>,<CP>
*Depvar
23,
1, Fp_11, Fp_11
2, Fp_22, Fp_22
3, Fp_33, Fp_33
4, Fp_23, Fp_23
5, Fp_32, Fp_32
6, Fp_13, Fp_13
7, Fp_31, Fp_31
8, Fp_12, Fp_12
9, Fp_21, Fp_21
10, gBarP, gBarP
11, nuP, nuP
12, Y, Y
13,   Hr, Hr
14,   detF, detF
15,   F_11, F_11
16,   F_22, F_22
17,   F_33, F_33
18,   F_12, F_12
19,   F_13, F_13
20,   F_21, F_21
21,   F_23, F_23
22,   F_31, F_31
23,   F_32, F_32
*Density
1.e-3
**
*********************************************************************
**                 INITIAL CONDITIONS, MODEL DATA
*********************************************************************
*Initial Conditions, type=TEMPERATURE
nall, 0.
*********************************************************************
**
** INTERACTION PROPERTIES
**
*Surface Interaction, name=IntProp-1
1.,
*Friction, slip tolerance=0.005
 0.3,
*Surface Behavior, pressure-overclosure=HARD
**
** BOUNDARY CONDITIONS
**
** Name: BC-1 Type: Displacement/Rotation
*Boundary
_PickedSet28, 1, 1
_PickedSet28, 2, 2
_PickedSet28, 6, 6
** Name: BC-2 Type: Symmetry/Antisymmetry/Encastre
*Boundary
_PickedSet29, ENCASTRE
** Name: BC-3 Type: Displacement/Rotation
*Boundary
_PickedSet124, 1, 1
**
** INTERACTIONS
**
** Interaction: Int-1
*Contact
*Contact Inclusions, ALL EXTERIOR
*Contact Property Assignment
 ,  , IntProp-1
*Surface Property Assignment, property=GEOMETRIC CORRECTION
_Int-1_gcs0_21, Circumferential, 75.0011, 10.25
_Int-1_gcs0_25, Circumferential, 75.0011, 10.25
_Int-1_gcs0_29, Circumferential, 70.4989, 6.75
_Int-1_gcs0_33, Circumferential, 70.4989, 6.75
_Int-1_gcs0_37, Circumferential, 79.4989, 6.75
_Int-1_gcs0_41, Circumferential, 79.4989, 6.75
** ----------------------------------------------------------------
**
** STEP: Step-1
**
*Step, name=Load, nlgeom=YES, inc=10000, unsymm=YES
*Coupled Temperature-displacement, deltmx = 1.
0.1, 10., 1.e-10, 0.1
*Solution Technique, type=SEPARATED
** *Controls, reset
*Controls, parameters=time incrementation
100, 100, 100, 100, 100, 100, ,20 , , ,
**
** BOUNDARY CONDITIONS
**
** Name: BC-1 Type: Displacement/Rotation
*Boundary
_PickedSet28, 2, 2, -0.13
**
** OUTPUT REQUESTS
**
*Restart, write, frequency=0
**
** FIELD OUTPUT: F-Output-1
**
*Output, field, time interval=0.1, time marks=no
** *Output, field, frequency=1
*Node Output
U, NT
*Element Output, directions=YES
SDV,S,LE
**
** HISTORY OUTPUT: H-Output-1
**
*Output, history, frequency=1
*Node Output, nset=support-1-RefPt_
RF2, U2
*Node Output, nset=support-2-RefPt_
RF2, U2
*Node Output, nset=support-3-RefPt_
RF2, U2
*End Step
** ----------------------------------------------------------------
**
** STEP: Step-2
**
*Step, name=Unload, nlgeom=YES, inc=10000, unsymm=YES
*Coupled Temperature-displacement, deltmx = 1.
0.1, 1., 1.e-10, 0.1
*Solution Technique, type=SEPARATED
** *Controls, reset
*Controls, parameters=time incrementation
100, 100, 100, 100, 100, 100, ,20 , , ,
**
** BOUNDARY CONDITIONS
**
** Name: BC-1 Type: Displacement/Rotation
*Boundary
_PickedSet28, 2, 2, -0.1
**
** OUTPUT REQUESTS
**
*Restart, write, frequency=0
**
** FIELD OUTPUT: F-Output-1
**
*Output, field, time interval=0.01, time marks=no
** *Output, field, frequency=1
*Node Output
U, NT
*Element Output, directions=YES
SDV,S,LE
**
** HISTORY OUTPUT: H-Output-1
**
*Output, history, frequency=1
*Node Output, nset=support-1-RefPt_
RF2, U2
*Node Output, nset=support-2-RefPt_
RF2, U2
*Node Output, nset=support-3-RefPt_
RF2, U2
*End Step
** ----------------------------------------------------------------
**
** STEP: Step-3
**
*Step, name=Reload, nlgeom=YES, inc=10000, unsymm=YES
*Coupled Temperature-displacement, deltmx = 1.
0.1, 10., 1.e-10, 0.1
*Solution Technique, type=SEPARATED
** *Controls, reset
*Controls, parameters=time incrementation
100, 100, 100, 100, 100, 100, ,20 , , ,
**
** BOUNDARY CONDITIONS
**
** Name: BC-1 Type: Displacement/Rotation
*Boundary
_PickedSet28, 2, 2, -1.5
**
** OUTPUT REQUESTS
**
*Restart, write, frequency=0
**
** FIELD OUTPUT: F-Output-1
**
** *Output, field, time interval=0.01, time marks=no
*Output, field, frequency=1
*Node Output
U, NT
*Element Output, directions=YES
SDV,S,LE
**
** HISTORY OUTPUT: H-Output-1
**
*Output, history, frequency=1
*Node Output, nset=support-1-RefPt_
RF2, U2
*Node Output, nset=support-2-RefPt_
RF2, U2
*Node Output, nset=support-3-RefPt_
RF2, U2
*End Step
** ----------------------------------------------------------------
